// Main WECC 240 bus model
//
// Most specifications in this file should be provided by the config.glm file
// unless they are considered invariant across the scenarios being considered.
//

#include "config.glm"

//#version "${VERSION}"

clock {
    timezone ${TIMEZONE};
    starttime ${STARTTIME};
    stoptime ${STOPTIME};
}

module pypower
{
    maximum_iterations ${MAXIMUM_ITERATIONS};
    maximum_timestep ${MAXIMUM_TIMESTEP};
    stop_on_failure ${STOP_ON_FAILURE};
    controllers ${CONTROLLERS_FILE};
    //save_case TRUE;
    enable_opf TRUE;
}

//
// Load the PSS/E model
//
#input "${RAWFILE}"

//
// Load the GIS data
//
#include "${GISDATA}"

//
// Load powerplant data
//
#include "../data/powerplants.glm"
#include "../data/powerplants_gis.glm"

//
// Building load geodata
//
#include "../data/buildings.glm"
#include "../data/buildings_gis.glm"

//
// Manual model fixes
//
#include "fixes.glm"

//
// Save the final result to JSON
//
#set savefile="${SAVEFILE}"
